// COMSOL Multiphysics 5.6.0.280 model "cee6736.mph"
// Outline of the model tree

Geometry
  geom1 "Geometry 1" (2D, length unit m)
    sq1: Square | size = 100
    c1: Circle | pos = {30, 10}; r = 5
    c2: Circle | pos = {30, 30}; r = 5
    c3: Circle | pos = {30, 50}; r = 5
    c4: Circle | pos = {30, 70}; r = 5
    c5: Circle | pos = {50, 10}; r = 5
    c6: Circle | pos = {50, 50}; r = 5
    c7: Circle | pos = {50, 70}; r = 5
    c8: Circle | pos = {50, 90}; r = 5
    c9: Circle | pos = {70, 10}; r = 5
    c10: Circle | pos = {70, 90}; r = 5
    dif1: Difference (disabled) | input = sq1; input2 = c1, c10, c2, c3, c4, c5, c6, c7, c8, c9
    par1: Partition "Partition Objects 1" | input = sq1; tool = c1, c10, c2, c3, c4, c5, c6, c7, c8, c9; keepinput = on
    fin: Finalize "Form Union"

Materials
  mat1: Common "C (Carbon, diamond, graphite) (Weber et al. 2010: Graphene; n,k 0.21-1.0 µm)" on all domains
    def "Basic"
      youngsmodulus = 2.5*1000000000000
      poissonsratio = 0.188
      density = 2.267*1000
    RefractiveIndex
      n = n_interp(c_const/freq)
      ki = k_interp(c_const/freq)
      int1: Interpolation "Refractive index"
        funcname = n_interp
        table = 
          {2.10873e-07, 1.375211}
          {2.12461E-7, 1.233285}
          {2.14049e-07, 1.09382}
          {2.15637E-7, 0.967508}
          {2.17225E-7, 0.867752}
          {2.18813E-7, 0.802065}
          {2.20401e-07, 0.767137}
          {2.21989E-7, 0.754486}
          {2.23577E-7, 0.756332}
          {2.25165E-7, 0.767087}
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        interp = piecewisecubic
        argunit = m
        fununit = 1
      int2: Interpolation "Refractive index, imaginary part"
        funcname = k_interp
        table = 
          {2.10873e-07, 0.376681}
          {2.12461E-7, 0.414237}
          {2.14049e-07, 0.48083}
          {2.15637E-7, 0.578555}
          {2.17225E-7, 0.701942}
          {2.18813E-7, 0.836639}
          {2.20401e-07, 0.968274}
          {2.21989E-7, 1.089294}
          {2.23577E-7, 1.197726}
          {2.25165E-7, 1.294131}
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        interp = piecewisecubic
        argunit = m
        fununit = 1
  mat2: Common "PMMA [solid]" on domains 1
    def "Basic"
      thermalconductivity = k(T[1/K])[W/(m*K)]
      thermalexpansioncoefficient = (alpha(T[1/K])[1/K]+(Tempref-293[K])*if(abs(T-Tempref)>1e-3,(alpha(T[1/K])[1/K]-alpha(Tempref[1/K])[1/K])/(T-Tempref),d(alpha(T[1/K])[1/K],T)))/(1+alpha(Tempref[1/K])[1/K]*(Tempref-293[K]))
      density = rho(T[1/K])[kg/m^3]
      TD = TD(T[1/K])[m^2/s]
      k: Piecewise | arg = T; pieces = {293.0, 352.0, 0.1510983+1.344534E-4*T^1}
      alpha: Piecewise | arg = T; pieces = {293.0, 323.0, 5.840372E-5-4.831146E-7*T^1+1.757514E-9*T^2}
      rho: Piecewise | arg = T; pieces = {293.0, 323.0, 1082.529+0.974361*T^1-0.002073609*T^2}
      TD: Piecewise
        arg = T
        pieces = 
          {87.0, 308.0, 2.552466E-7-5.175922E-10*T^1+2.95724E-13*T^2}
          {308.0, 460.0, -7.896105E-6+8.38529E-8*T^1-3.249648E-10*T^2+5.518894E-13*T^3-3.476433E-16*T^4}
    ThermalExpansion
      alphatan = 5
      dL = (dL(T[1/K])-dL(Tempref[1/K]))/(1+dL(Tempref[1/K]))
      dL: Piecewise | arg = T; pieces = {293.0, 323.0, 0.031294866-2.81029E-4*T^1+5.946095E-7*T^2}
    Enu "Young's modulus and Poisson's ratio"
      youngsmodulus = E(T[1/K])[Pa]
      poissonsratio = nu(T[1/K])
      E: Piecewise
        arg = T
        pieces = 
          {68.0, 125.0, 7.3846E9}
          {125.0, 400.0, 4.31023E9+6.934433E7*T^1-528212.9*T^2+1579.615*T^3-1.742098*T^4}
      nu: Piecewise
        arg = T
        pieces = 
          {68.0, 124.0, 0.34502}
          {124.0, 270.0, 0.6787961-0.006076254*T^1+3.893231E-5*T^2-1.066899E-7*T^3+1.037697E-10*T^4}
          {270.0, 400.0, 6.00413-0.07428949*T^1+3.664807E-4*T^2-8.064015E-7*T^3+6.657131E-10*T^4}
    KG "Bulk modulus and shear modulus"
      K = kappa(T[1/K])[Pa]
      G = mu(T[1/K])[Pa]
      mu: Piecewise
        arg = T
        pieces = 
          {68.0, 125.0, 2.7459E9}
          {125.0, 400.0, 8.498712E8+3.971458E7*T^1-287911.7*T^2+846.344*T^3-0.9122308*T^4}
      kappa: Piecewise
        arg = T
        pieces = 
          {68.0, 124.0, 7.923015E9}
          {124.0, 400.0, 2.054283E10-2.194785E8*T^1+1354634.0*T^2-3721.425*T^3+3.647352*T^4}

Physics
  solid: SolidMechanics on all domains
    dependent variable u = {u, v, w}
    lemm1: LinearElasticModel "Linear Elastic Material 1" (default)
    free1: Free (default)
    init1: init "Initial Values 1" (default)
    fix1: Fixed "Fixed Constraint 1" on boundaries 2
    fix2: Fixed "Fixed Constraint 2" (disabled) on boundaries 2, 4
    bndl1: BoundaryLoad on boundaries 3 | FperArea = {0, -100, 0}
    bndl2: BoundaryLoad on boundaries 1 | FperArea = {-100, 0, 0}
    bndl3: BoundaryLoad on boundaries 4 | FperArea = {100, 0, 0}

Mesh
  mesh1 "Mesh 1"
    size: MeshSizeDefault | hmax = 5; hmin = 5; hgrad = 1; hcurve = 1
    ftri1: FreeTri "Free Triangular 1" on remaining entities | smoothcontrol = off
    fq1: FreeQuad (disabled) on all domains | smoothmaxiter = 5; smoothmaxdepth = 5; method = legacy52
    dis1: Distribution (disabled) on no boundaries

Studies
  std1 "Study 1"
    stat: Stationary

Solver configurations
  sol1 "Solution 1" (study std1)
    v1: Variables "Dependent Variables 1"
    s1: Stationary "Stationary Solver 1"
      dDef: Direct
      fc1: FullyCoupled | linsolver = dDef

Datasets
  dset1: Solution | solution = sol1

Plots
  pg1: PlotGroup2D "Stress (solid)" | data = dset1
    surf1: Surface | expr = solid.mises
      def: Deform "Deformation" | expr = {u, v}; descr = Displacement field
  pg2: PlotGroup2D "Point Loads (solid)" | data = dset1
    arpt1: ArrowPoint "Point Load 1" | expr = {solid.pl1.F_Px, solid.pl1.F_Py}
      col: Color "Color Expression" | expr = solid.pl1.F_P_Mag
      def: Deform "Deformation" | expr = {u, v}; descr = Displacement field
    surf1: Surface "Gray Surfaces" | expr = 1
      def: Deform "Deformation" | expr = {u, v}; descr = Displacement field
      sel1: Selection on domains 1-5, 7-10
  pg3: PolarGroup "Polar Plot Group 3" | data = dset1

Exports
  data1: Data "coor"
    data = dset1
    expr = dom
    descr = Entity index
    filename = /Users/hanfengzhai/Desktop/cee6736/project/simulation_archive/design_1/X.txt
  data2: Data "vonMises"
    data = dset1
    expr = solid.misesGp
    descr = von Mises stress, Gauss point evaluation
    filename = /Users/hanfengzhai/Desktop/cee6736/project/simulation_archive/design_40/D40.txt